<?xml version="1.0"?>
<?xml-stylesheet type="text/xsl" href="http://jsbsim.sourceforge.net/JSBSim.xsl"?>
<fdm_config name="MiG-29" version="2.0" release="ALPHA"
   xmlns:xsi="http://www.w3.org/2001/XMLSchema-instance"
   xsi:noNamespaceSchemaLocation="http://jsbsim.sourceforge.net/JSBSim.xsd">

 <fileheader>
  <author> Aeromatic v 0.91 </author>
  <filecreationdate> 2010-12-21 </filecreationdate>
  <version>$Revision: 1.10 $</version>
  <description> Models a MiG-29 (9-12). </description>
 </fileheader>

<!--
  File:     MiG-29.xml
  Inputs:
    name:          MiG-29
    type:          two-engine transonic/supersonic fighter
    max weight:    39910.5 lb
    wing span:     37.27216 ft
    length:        56.82692 ft
    wing area:     409.7159 sq-ft
    gear type:     tricycle
    retractable?:  yes
    # engines:     2
    engine type:   turbine
    engine layout: aft fuselage
    yaw damper?    yes
  Outputs:
    wing loading:  97.41 lb/sq-ft
    CL-alpha:      3.6 per radian
    CL-0:          0.08
    CL-max:        1
    CD-0:          0.024
    K:             0.12

-->

 <metrics>
   <wingarea  unit="M2">    38.00 </wingarea>
   <wingspan  unit="M" >    11.43 </wingspan>
   <wing_incidence>          0.00 </wing_incidence>
   <chord     unit="M" >    3.768 </chord>
   <htailarea unit="M2">     7.05 </htailarea>
   <htailarm  unit="M" >     7.78 </htailarm>
   <vtailarea unit="M2">    10.1  </vtailarea>
   <vtailarm  unit="FT" >   22.73 </vtailarm>
   <location name="AERORP" unit="M">
     <!--x>   1.66  </x-->
     <x>   1.81084  </x>
     <y>   0.00     </y>
     <z>  -0.169    </z>
   </location>
   <location name="EYEPOINT" unit="M">
     <x>  -3.3 </x>
     <y>   0.0 </y>
     <z>   0.8 </z>
   </location>
   <location name="VRP" unit="M">
     <x>0</x>
     <y>0</y>
     <z>0</z>
   </location>
 </metrics>

 <mass_balance>
   <ixx unit="SLUG*FT2">     21721 </ixx>
   <iyy unit="SLUG*FT2">     69405 </iyy>
   <izz unit="SLUG*FT2">     69183 </izz>
   <emptywt unit="KG" >      10900 </emptywt>
   <location name="CG" unit="M">
     <!--x>  1.29  </x-->
     <x>  0.85  </x>
     <y>  0.00  </y>
     <z> -0.189 </z>
   </location>

   <pointmass name="Pilot">
    <weight unit="KG">85</weight>
    <location unit="M">
     <x>-3.3</x>
     <y> 0.0</y>
     <z> 0.6</z>
    </location>
   </pointmass>

   <!-- Боевая нагрузка -->
   <!-- АПУ-470 -->
   <pointmass name="APU-470_L">
    <weight unit="KG">0</weight><!-- 70 KG - 154.3235835294143 LBS -->
    <location unit="M">
     <x> 2.0</x>
     <y>-2.44</y>
     <z>-0.2875</z>
    </location>
   </pointmass>
   <pointmass name="APU-470_R">
    <weight unit="KG">0</weight>
    <location unit="M">
     <x> 2.0</x>
     <y> 2.44</y>
     <z>-0.2875</z>
    </location>
   </pointmass>
   <!-- АПУ-60-1 -->
   <pointmass name="APU-60-1_1">
    <weight unit="KG">0</weight><!-- 32 KG - 70.54792389916082 LBS -->
    <location unit="M">
     <x> 1.845</x>
     <y>-2.44</y>
     <z>-0.317</z>
    </location>
   </pointmass>
   <pointmass name="APU-60-1_2">
    <weight unit="KG">0</weight>
    <location unit="M">
     <x> 1.845</x>
     <y> 2.44</y>
     <z>-0.317</z>
    </location>
   </pointmass>
   <pointmass name="APU-60-1_3">
    <weight unit="KG">0</weight>
    <location unit="M">
     <x> 2.495</x>
     <y>-3.193846154</y>
     <z>-0.364</z>
    </location>
   </pointmass>
   <pointmass name="APU-60-1_4">
    <weight unit="KG">0</weight>
    <location unit="M">
     <x> 2.495</x>
     <y> 3.193846154</y>
     <z>-0.364</z>
    </location>
   </pointmass>
   <pointmass name="APU-60-1_5">
    <weight unit="KG">0</weight>
    <location unit="M">
     <x> 3.045</x>
     <y>-3.867692308</y>
     <z>-0.406</z>
    </location>
   </pointmass>
   <pointmass name="APU-60-1_6">
    <weight unit="KG">0</weight>
    <location unit="M">
     <x> 3.045</x>
     <y> 3.867692308</y>
     <z>-0.406</z>
    </location>
   </pointmass>
   <!-- АПУ-73-1 -->
   <pointmass name="APU-73-1_1">
    <weight unit="KG">0</weight><!-- 49 KG - 108.02650847059 LBS -->
    <location unit="M">
     <x> 2.28</x>
     <y>-2.44</y>
     <z>-0.399</z>
    </location>
   </pointmass>
   <pointmass name="APU-73-1_2">
    <weight unit="KG">0</weight>
    <location unit="M">
     <x> 2.28</x>
     <y> 2.44</y>
     <z>-0.399</z>
    </location>
   </pointmass>
   <pointmass name="APU-73-1_3">
    <weight unit="KG">0</weight>
    <location unit="M">
     <x> 2.88</x>
     <y>-3.193846154</y>
     <z>-0.447</z>
    </location>
   </pointmass>
   <pointmass name="APU-73-1_4">
    <weight unit="KG">0</weight>
    <location unit="M">
     <x> 2.88</x>
     <y> 3.193846154</y>
     <z>-0.447</z>
    </location>
   </pointmass>
   <pointmass name="APU-73-1_5">
    <weight unit="KG">0</weight>
    <location unit="M">
     <x> 3.45</x>
     <y>-3.867692308</y>
     <z>-0.487</z>
    </location>
   </pointmass>
   <pointmass name="APU-73-1_6">
    <weight unit="KG">0</weight>
    <location unit="M">
     <x> 3.45</x>
     <y> 3.867692308</y>
     <z>-0.487</z>
    </location>
   </pointmass>
   <!-- БД3-УМК -->
   <pointmass name="BD3-UMK_1">
    <weight unit="KG">0</weight><!-- 60 KG - 132.277357311 LBS -->
    <location unit="M">
     <x> 2.28</x>
     <y>-2.44</y>
     <z>-0.399</z>
    </location>
   </pointmass>
   <pointmass name="BD3-UMK_2">
    <weight unit="KG">0</weight>
    <location unit="M">
     <x> 2.28</x>
     <y> 2.44</y>
     <z>-0.399</z>
    </location>
   </pointmass>
   <pointmass name="BD3-UMK_3">
    <weight unit="KG">0</weight>
    <location unit="M">
     <x> 2.88</x>
     <y>-3.193846154</y>
     <z>-0.447</z>
    </location>
   </pointmass>
   <pointmass name="BD3-UMK_4">
    <weight unit="KG">0</weight>
    <location unit="M">
     <x> 2.88</x>
     <y> 3.193846154</y>
     <z>-0.447</z>
    </location>
   </pointmass>
   <!-- МБД3-У2Т-1 -->
   <pointmass name="MBD3-U2T_1">
    <weight unit="KG">0</weight><!-- 140 KG - 308.647167059 LBS -->
    <location unit="M">
     <x> 2.28</x>
     <y>-2.44</y>
     <z>-0.399</z>
    </location>
   </pointmass>
   <pointmass name="MBD3-U2T_2">
    <weight unit="KG">0</weight>
    <location unit="M">
     <x> 2.28</x>
     <y> 2.44</y>
     <z>-0.399</z>
    </location>
   </pointmass>
   <pointmass name="MBD3-U2T_3">
    <weight unit="KG">0</weight>
    <location unit="M">
     <x> 2.88</x>
     <y>-3.193846154</y>
     <z>-0.447</z>
    </location>
   </pointmass>
   <pointmass name="MBD3-U2T_4">
    <weight unit="KG">0</weight>
    <location unit="M">
     <x> 2.88</x>
     <y> 3.193846154</y>
     <z>-0.447</z>
    </location>
   </pointmass>
   <!-- АПУ-68 -->
   <pointmass name="APU-68_1">
    <weight unit="KG">0</weight><!-- 40 KG - 88.184904874 LBS -->
    <location unit="M">
     <x> 2.28</x>
     <y>-2.44</y>
     <z>-0.399</z>
    </location>
   </pointmass>
   <pointmass name="APU-68_2">
    <weight unit="KG">0</weight>
    <location unit="M">
     <x> 2.28</x>
     <y> 2.44</y>
     <z>-0.399</z>
    </location>
   </pointmass>
   <pointmass name="APU-68_3">
    <weight unit="KG">0</weight>
    <location unit="M">
     <x> 2.88</x>
     <y>-3.193846154</y>
     <z>-0.447</z>
    </location>
   </pointmass>
   <pointmass name="APU-68_4">
    <weight unit="KG">0</weight>
    <location unit="M">
     <x> 2.88</x>
     <y> 3.193846154</y>
     <z>-0.447</z>
    </location>
   </pointmass>
<!-- Ракеты -->
   <!-- Р-27Р -->
   <pointmass name="R-27R_L">
    <weight unit="KG">0</weight><!-- 253 KG - 557.7695233277402 LBS -->
    <location unit="M">
     <x> 1.93</x>
     <y>-2.44</y>
     <z>-0.54</z>
    </location>
   </pointmass>
   <pointmass name="R-27R_R">
    <weight unit="KG">0</weight>
    <location unit="M">
     <x> 1.93</x>
     <y> 2.44</y>
     <z>-0.54</z>
    </location>
   </pointmass>
   <!-- Р-60М -->
   <pointmass name="R-60M_1">
    <weight unit="KG">0</weight><!-- 44 KG - 97.0033953634612 -->
    <location unit="M">
     <x> 1.85</x>
     <y>-2.44</y>
     <z>-0.487</z>
    </location>
   </pointmass>
   <pointmass name="R-60M_2">
    <weight unit="KG">0</weight>
    <location unit="M">
     <x> 1.85</x>
     <y> 2.44</y>
     <z>-0.487</z>
    </location>
   </pointmass>
   <pointmass name="R-60M_3">
    <weight unit="KG">0</weight>
    <location unit="M">
     <x> 2.5</x>
     <y>-3.193846154</y>
     <z>-0.534</z>
    </location>
   </pointmass>
   <pointmass name="R-60M_4">
    <weight unit="KG">0</weight>
    <location unit="M">
     <x> 2.5</x>
     <y> 3.193846154</y>
     <z>-0.534</z>
    </location>
   </pointmass>
   <pointmass name="R-60M_5">
    <weight unit="KG">0</weight>
    <location unit="M">
     <x> 3.05</x>
     <y>-3.867692308</y>
     <z>-0.576</z>
    </location>
   </pointmass>
   <pointmass name="R-60M_6">
    <weight unit="KG">0</weight>
    <location unit="M">
     <x> 3.05</x>
     <y> 3.867692308</y>
     <z>-0.576</z>
    </location>
   </pointmass>
   <!-- Р-73 -->
   <pointmass name="R-73_1">
    <weight unit="KG">0</weight><!-- 105 KG - 231.4853752941215 -->
    <location unit="M">
     <x> 2.36</x>
     <y>-2.44</y>
     <z>-0.4965</z>
    </location>
   </pointmass>
   <pointmass name="R-73_2">
    <weight unit="KG">0</weight>
    <location unit="M">
     <x> 2.36</x>
     <y> 2.44</y>
     <z>-0.4965</z>
    </location>
   </pointmass>
   <pointmass name="R-73_3">
    <weight unit="KG">0</weight>
    <location unit="M">
     <x> 2.96</x>
     <y>-3.193846154</y>
     <z>-0.5445</z>
    </location>
   </pointmass>
   <pointmass name="R-73_4">
    <weight unit="KG">0</weight>
    <location unit="M">
     <x> 2.96</x>
     <y> 3.193846154</y>
     <z>-0.5445</z>
    </location>
   </pointmass>
   <pointmass name="R-73_5">
    <weight unit="KG">0</weight>
    <location unit="M">
     <x> 3.53</x>
     <y>-3.867692308</y>
     <z>-0.5845</z>
    </location>
   </pointmass>
   <pointmass name="R-73_6">
    <weight unit="KG">0</weight>
    <location unit="M">
     <x> 3.53</x>
     <y> 3.867692308</y>
     <z>-0.5845</z>
    </location>
   </pointmass>

 </mass_balance>

 <ground_reactions>

  <contact type="BOGEY" name="NOSE">
   <location unit="M">
     <x> -1.61047 </x>
     <y>  0.000 </y>
     <z> -2.05521 </z>
   </location>
   <static_friction>  0.80 </static_friction>
   <dynamic_friction> 0.50 </dynamic_friction>
   <rolling_friction> 0.03 </rolling_friction>
   <spring_coeff unit="LBS/FT">      21973.15 </spring_coeff>
   <damping_coeff unit="LBS/FT/SEC">  3991.05 </damping_coeff>
   <max_steer unit="DEG"> 31.00 </max_steer>
   <brake_group>NOSE</brake_group>
   <retractable>1</retractable>
 </contact>

  <contact type="BOGEY" name="LEFT_MAIN">
   <location unit="M">
     <x>  2.079 </x>
     <y> -1.69302 </y>
     <z> -2.01889 </z>
   </location>
   <static_friction>  0.80 </static_friction>
   <dynamic_friction> 0.50 </dynamic_friction>
   <rolling_friction> 0.03 </rolling_friction>
   <spring_coeff unit="LBS/FT">      39910.50 </spring_coeff>
   <damping_coeff unit="LBS/FT/SEC">  7982.10 </damping_coeff>
   <max_steer unit="DEG">0</max_steer>
   <brake_group>LEFT</brake_group>
   <retractable>1</retractable>
 </contact>

  <contact type="BOGEY" name="RIGHT_MAIN">
   <location unit="M">
     <x>  2.079 </x>
     <y>  1.69302 </y>
     <z> -2.01889 </z>
   </location>
   <static_friction>  0.80 </static_friction>
   <dynamic_friction> 0.50 </dynamic_friction>
   <rolling_friction> 0.03 </rolling_friction>
   <spring_coeff unit="LBS/FT">      39910.50 </spring_coeff>
   <damping_coeff unit="LBS/FT/SEC">  7982.10 </damping_coeff>
   <max_steer unit="DEG">0</max_steer>
   <brake_group>RIGHT</brake_group>
   <retractable>1</retractable>
 </contact>

  <contact type="STRUCTURE" name="LEFT_WING">
    <location unit="M">
     <x>   4.464 </x>
     <y>  -5.701 </y>
     <z>  -0.266 </z>
    </location>
    <static_friction>  0.80 </static_friction>
    <dynamic_friction> 0.50 </dynamic_friction>
    <spring_coeff unit="LBS/FT">      39910.50 </spring_coeff>
    <damping_coeff unit="LBS/FT/SEC">  7982.10 </damping_coeff>
 </contact>

  <contact type="STRUCTURE" name="RIGHT_WING">
    <location unit="M">
     <x>   4.464 </x>
     <y>   5.701 </y>
     <z>  -0.266 </z>
    </location>
    <static_friction>  0.80 </static_friction>
    <dynamic_friction> 0.50 </dynamic_friction>
    <spring_coeff unit="LBS/FT">      39910.50 </spring_coeff>
    <damping_coeff unit="LBS/FT/SEC">  7982.10 </damping_coeff>
 </contact>

  <contact type="STRUCTURE" name="NOSE_FUS">
    <location unit="M">
     <x>  -7.76 </x>
     <y>   0.00 </y>
     <z>  -0.12 </z>
    </location>
    <static_friction>  0.80 </static_friction>
    <dynamic_friction> 0.50 </dynamic_friction>
    <spring_coeff unit="LBS/FT">      39910.50 </spring_coeff>
    <damping_coeff unit="LBS/FT/SEC">  7982.10 </damping_coeff>
 </contact>

  <contact type="STRUCTURE" name="TAIL_FUS">
    <location unit="M">
     <x>   7.15 </x>
     <y>   0.00 </y>
     <z>  -0.91 </z>
    </location>
    <static_friction>  0.80 </static_friction>
    <dynamic_friction> 0.50 </dynamic_friction>
    <spring_coeff unit="LBS/FT">      39910.50 </spring_coeff>
    <damping_coeff unit="LBS/FT/SEC">  7982.10 </damping_coeff>
 </contact>

 </ground_reactions>

<external_reactions>
  <property>fcs/parachute_reef_pos_norm</property>
  <force name="parachute" frame="WIND">
    <function>
      <product>
        <p> aero/qbar-psf </p>
        <p> fcs/parachute_reef_pos_norm </p>
        <v> 1.0 </v> <!-- Full drag coefficient -->
        <v> 182.986477084065 </v> <!-- Full parachute area -->
      </product>
    </function>
    <!-- The location below is in structural frame (x positive
         aft), so this location describes a point 1 foot aft
         of the origin. In this case, the origin is the center. -->
    <location unit="FT">
      <x>1</x>
      <y>0</y>
      <z>0</z>
    </location>
    <!-- The direction describes a unit vector. In this case, since
         the selected frame is the WIND frame, the "-1" x component
         describes a direction exactly opposite of the direction
         into the wind vector. That is, the direction specified below
         is the direction that the drag force acts in. -->
    <direction>
      <x>-1</x>
      <y> 0</y>
      <z> 0</z>
    </direction>
  </force>
</external_reactions>

 <propulsion>

   <engine file="RD-33">
    <location unit="M">
      <x>  4.995 </x>
      <y> -0.839 </y>
      <z> -0.40 </z>
    </location>
    <orient unit="DEG">
      <pitch> 0.00 </pitch>
      <roll>  0.00 </roll>
      <yaw>   0.00 </yaw>
    </orient>
    <feed>8</feed>
    <thruster file="direct">
    <location unit="M">
      <x>  5.647 </x>
      <y> -0.839 </y>
      <z> -0.40 </z>
    </location>
     <orient unit="DEG">
       <pitch> 4.00 </pitch>
       <roll>  0.00 </roll>
       <yaw>  -1.50 </yaw>
     </orient>
    </thruster>
  </engine>

   <engine file="RD-33">
    <location unit="M">
      <x>  4.995 </x>
      <y>  0.839 </y>
      <z> -0.40 </z>
    </location>
    <orient unit="DEG">
      <pitch> 0.00 </pitch>
      <roll>  0.00 </roll>
      <yaw>   0.00 </yaw>
    </orient>
    <feed>9</feed>
    <thruster file="direct">
    <location unit="M">
      <x>  5.647 </x>
      <y>  0.839 </y>
      <z> -0.40 </z>
    </location>
     <orient unit="DEG">
       <pitch> 4.00 </pitch>
       <roll>  0.00 </roll>
       <yaw>   1.50 </yaw>
     </orient>
    </thruster>
  </engine>

   <engine file="GTDE-117_T">
    <location unit="M">
      <x>  5.0  </x>
      <y>  0.0  </y>
      <z> -0.18 </z>
    </location>
    <orient unit="DEG">
      <pitch> 0.00 </pitch>
      <roll>  0.00 </roll>
      <yaw>   0.00 </yaw>
    </orient>
    <feed>1</feed>
    <thruster file="direct">
    <location unit="M">
      <x>  5.0  </x>
      <y>  0.0  </y>
      <z> -0.18 </z>
    </location>
     <orient unit="RAD">
       <pitch>  0.0 </pitch>
       <roll>   0.0 </roll>
       <yaw>    0.0 </yaw>
     </orient>
    </thruster>
  </engine>

  <tank type="FUEL" number="0"><!--Tank N1 650L-->
     <name>Tank 1</name>
     <location unit="M">
       <x>-0.03 </x>
       <y> 0.00 </y>
       <z> 0.40 </z>
     </location>
     <capacity unit="KG"> 510.25 </capacity>
     <contents unit="KG"> 510.25 </contents>
     <density unit="KG/L">0.785</density>
  </tank>

  <tank type="FUEL" number="1"> <!--Tank N2 870L, расходный-->
     <name>Tank 2</name>
     <location unit="M">
       <x> 0.805 </x>
       <y> 0.000 </y>
       <z> 0.400 </z>
     </location>
     <capacity unit="KG"> 682.95 </capacity>
     <contents unit="KG"> 682.95 </contents>
     <density unit="KG/L">0.785</density>
  </tank>

  <tank type="FUEL" number="2"><!--Tank N3 1810L-->
     <name>Tank 3</name>
     <location unit="M">
       <x> 1.868 </x>
       <y> 0.000 </y>
       <z> 0.220 </z>
     </location>
     <capacity unit="KG"> 1420.85 </capacity>
     <contents unit="KG"> 1420.85 </contents>
     <density unit="KG/L">0.785</density>
  </tank>

  <tank type="FUEL" number="3"><!--Tank N3a Left 155L-->
     <name>Tank 3aL</name>
     <location unit="M">
       <x> 3.525 </x>
       <y>-1.920 </y>
       <z> 0.176 </z>
     </location>
     <capacity unit="KG"> 121.675 </capacity>
     <contents unit="KG"> 121.675 </contents>
     <density unit="KG/L">0.785</density>
  </tank>

  <tank type="FUEL" number="4"><!--Tank N3a Right 155L-->
     <name>Tank 3aR</name>
     <location unit="M">
       <x> 3.525 </x>
       <y> 1.920 </y>
       <z> 0.176 </z>
     </location>
     <capacity unit="KG"> 121.675 </capacity>
     <contents unit="KG"> 121.675 </contents>
     <density unit="KG/L">0.785</density>
  </tank>

  <tank type="FUEL" number="5"><!--left wing tank   330L-->
     <name>Tank LW</name>
     <location unit="M">
       <x>  2.435 </x>
       <y> -2.900 </y>
       <z>  0.019 </z>
     </location>
     <capacity unit="KG"> 259.05 </capacity>
     <contents unit="KG"> 259.05 </contents>
     <density unit="KG/L">0.785</density>
  </tank>

  <tank type="FUEL" number="6"><!--right wing tank   330L-->
     <name>Tank RW</name>
     <location unit="M">
       <x>  2.435 </x>
       <y>  2.900 </y>
       <z>  0.019 </z>
     </location>
     <capacity unit="KG"> 259.05 </capacity>
     <contents unit="KG"> 259.05 </contents>
     <density unit="KG/L">0.785</density>
  </tank>

  <tank type="FUEL" number="7"><!--PTB   1500L-->
     <name>Tank PF</name>
     <location unit="M">
       <x>  2.34  </x>
       <y>  0.0   </y>
       <z> -0.86 </z>
     </location>
     <capacity unit="KG"> 1193.2 </capacity>
     <contents unit="KG"> 1193.2 </contents>
     <density unit="KG/L">0.785</density>
  </tank>

  <tank type="FUEL" number="8"><!-- Fuel accumulator (left) -->
     <name>AccumL</name>
     <location unit="M">
       <x> 1.868 </x>
       <y> 0.000 </y>
       <z> 0.220 </z>
     </location>
     <capacity unit="KG"> 16.8 </capacity>
     <contents unit="KG"> 1.0 </contents>
     <density unit="KG/L">0.785</density>
  </tank>

  <tank type="FUEL" number="9"><!-- Fuel accumulator (right) -->
     <name>AccumR</name>
     <location unit="M">
       <x> 1.868 </x>
       <y> 0.000 </y>
       <z> 0.220 </z>
     </location>
     <capacity unit="KG"> 16.8 </capacity>
     <contents unit="KG"> 1.0 </contents>
     <density unit="KG/L">0.785</density>
  </tank>

 </propulsion>

 <flight_control name="FCS: MiG-29">

 <property>fcs/met</property>

  <channel name="Pitch">

   <aerosurface_scale name="fcs/met-trimmer">
      <input>fcs/pitch-trim-cmd-norm</input>
      <domain>
        <min> -1 </min>
        <max>  1 </max>
      </domain>
      <range>
       <min>-0.8</min>
       <max> 0.8</max>
      </range>
      <clipto>
       <min>-0.8</min>
       <max> 0.4</max>
      </clipto>
      <output>fcs/met</output>
   </aerosurface_scale>

   <summer name="Pitch Trim Sum">
      <input>systems/ARU/NLMgo</input>
      <input>fcs/met</input>
      <clipto>
        <min> -1.0 </min>
        <max>  0.5 </max>
      </clipto>
   </summer>

   <switch name="fcs/pitch-arm-150m-hydropower">
    <default value="0.0"/>
    <test value="fcs/sau-pitch">
     hs/arm-150m-pitch-serviceable > 0
    </test>
   </switch>

   <summer name="Pitch Sau Sum">
    <input>fcs/pitch-trim-sum</input>
    <input>fcs/pitch-APUS</input>
    <input>fcs/pitch-arm-150m-hydropower</input>
    <clipto>
     <min>-1.0</min>
     <max> 0.5</max>
    </clipto>
   </summer>

   <switch name="fcs/pitch-hydropower">
    <default value="fcs/elevator-pos-static"/>
    <test value="fcs/pitch-sau-sum">
     hs/busters-serviceable > 0
    </test>
   </switch>

   <fcs_function name="calculations/elevator-min">
    <description>Ограничитель угла отклонения стабилизатора (носок вверх)</description>
    <function>
     <product>
      <value>-0.6109</value>
      <table>
       <independentVar lookup="row">fcs/aileron-cmd-norm</independentVar>
       <tableData>
            -1.0             0.666666667
            -0.833333335     0.693333333
            -0.666666668     0.726666667
            -0.5             0.766666667
            -0.333333334     0.816666667
            -0.166666667     0.883333333
             0.0             1.0
             0.166666667     0.883333333
             0.333333334     0.816666667
             0.5             0.766666667
             0.666666668     0.726666667
             0.833333335     0.693333333
             1.0             0.666666667
       </tableData>
      </table>
     </product>
    </function>
    <output>fcs/elevator-min</output>
   </fcs_function>

   <fcs_function name="calculations/elevator-max">
    <description>Ограничитель угла отклонения стабилизатора (носок вниз)</description>
    <function>
     <product>
      <value>0.2618</value>
      <table>
       <independentVar lookup="row">fcs/aileron-cmd-norm</independentVar>
       <tableData>
            -1.0             1.0
            -0.833333335     0.964285714
            -0.666666668     0.938742857
            -0.5             0.913142857
            -0.333333334     0.890225714
            -0.166666667     0.871428571
             0.0             0.857142857
             0.166666667     0.871428571
             0.333333334     0.890225714
             0.5             0.913142857
             0.666666668     0.938742857
             0.833333335     0.964285714
             1.0             1.0
       </tableData>
      </table>
     </product>
    </function>
    <output>fcs/elevator-max</output>
   </fcs_function>

   <fcs_function name="calculations/pitch-K">
    <description>Часть МПЧ</description>
    <function>
     <quotient>
      <property>fcs/pitch-hydropower</property>
      <property>systems/ARU/Knum</property>
     </quotient>
    </function>
    <output>fcs/pitch-K</output>
   </fcs_function>

   <aerosurface_scale name="Elevator Control">
      <input>fcs/pitch-K</input>
      <domain>
        <min> -1.0 </min>
        <max>  0.5 </max>
      </domain>
      <range>
        <min> -0.6109 </min>
        <max>  0.2618 </max>
      </range>
      <clipto>
       <min>fcs/elevator-min</min>
       <max>fcs/elevator-max</max>
      </clipto>
      <output>fcs/elevator-pos-raw</output>
   </aerosurface_scale>

    <kinematic name="Elevator filter">
     <input>fcs/elevator-pos-raw</input>
      <traverse>
        <setting>
          <position>-1</position>
          <time>0</time>
        </setting>
        <setting>
          <position>1</position>
          <time>1</time>
        </setting>
      </traverse>
      <output>fcs/elevator-pos-rad</output>
    </kinematic>

   <aerosurface_scale name="elevator normalization">
      <input>fcs/elevator-pos-rad</input>
      <domain>
        <min> -0.6109 </min>
        <max>  0.2618 </max>
      </domain>
      <range>
        <min> -1 </min>
        <max>  0.428548044 </max>
      </range>
      <output>fcs/elevator-pos-norm</output>
   </aerosurface_scale>

  </channel>

  <property>fcs/met-roll</property>

  <channel name="Roll">

   <aerosurface_scale name="fcs/met-roll-trimmer">
      <input>fcs/roll-trim-cmd-norm</input>
      <domain>
        <min> -1 </min>
        <max>  1 </max>
      </domain>
      <range>
       <min>0.58</min>
       <max>0.58</max>
      </range>
      <output>fcs/met-roll</output>
   </aerosurface_scale>

   <summer name="Roll Trim Sum">
      <input>fcs/aileron-cmd-norm</input>
      <input>fcs/met-roll</input>
      <clipto>
        <min> -1 </min>
        <max>  1 </max>
      </clipto>
   </summer>

   <scheduled_gain name="fcs/roll-NLM">
      <input>fcs/roll-trim-sum</input>
      <table>
        <independentVar lookup="row">aero/alpha-deg</independentVar>
        <tableData>
          -90     1.00
            0     1.00
           18     1.00
           24     0.25
           90     0.25
        </tableData>
      </table>
   </scheduled_gain>

   <switch name="fcs/roll-arm-150m-hydropower">
    <default value="0.0"/>
    <test value="fcs/sau-roll">
     hs/arm-150m-roll-serviceable > 0
    </test>
   </switch>

   <summer name="Roll Sau Sum">
    <input>fcs/roll-NLM</input>
    <input>fcs/roll-arm-150m-hydropower</input>
    <clipto>
     <min>-1</min>
     <max> 1</max>
    </clipto>
   </summer>

   <switch name="fcs/roll-hydropower">
    <default value="fcs/aileron-pos-static"/>
    <test value="fcs/roll-sau-sum">
     hs/busters-serviceable > 0
    </test>
   </switch>

   <switch name="fcs/left-aileron-cmd-switched">
    <default value="fcs/aileron-pos-static"/>
    <test value="fcs/roll-trim-sum">
     hs/busters-serviceable > 0
    </test>
   </switch>

   <switch name="fcs/right-aileron-cmd-switched">
    <default value="fcs/aileron-pos-static"/>
    <test value="fcs/roll-trim-sum">
     hs/busters-serviceable > 0
    </test>
   </switch>

   <aerosurface_scale name="Left Aileron Control">
      <input>fcs/roll-hydropower</input>
      <zero_centered>true</zero_centered>
      <range>
        <min> -0.35 </min>
        <max>  0.2618 </max>
      </range>
      <output>fcs/left-aileron-pos-raw</output>
   </aerosurface_scale>

    <kinematic name="Left Aileron filter">
     <input>fcs/left-aileron-pos-raw</input>
      <traverse>
        <setting>
          <position>-1</position>
          <time>0</time>
        </setting>
        <setting>
          <position>1</position>
          <time>1</time>
        </setting>
      </traverse>
      <output>fcs/left-aileron-pos-rad</output>
    </kinematic>

   <aerosurface_scale name="Right Aileron Control">
      <input>fcs/roll-hydropower</input>
      <zero_centered>true</zero_centered>
      <range>
        <min> -0.35 </min>
        <max>  0.2618 </max>
      </range>
      <output>fcs/right-aileron-pos-raw</output>
   </aerosurface_scale>

    <kinematic name="Right Aileron filter">
     <input>fcs/right-aileron-pos-raw</input>
      <traverse>
        <setting>
          <position>-1</position>
          <time>0</time>
        </setting>
        <setting>
          <position>1</position>
          <time>1</time>
        </setting>
      </traverse>
      <output>fcs/right-aileron-pos-rad</output>
    </kinematic>

   <aerosurface_scale name="left aileron normalization">
      <input>fcs/left-aileron-pos-rad</input>
      <zero_centered>true</zero_centered>
      <domain>
        <min> -0.35 </min>
        <max>  0.2618 </max>
      </domain>
      <range>
        <min> -1 </min>
        <max>  1 </max>
      </range>
      <output>fcs/left-aileron-pos-norm</output>
   </aerosurface_scale>

   <aerosurface_scale name="right aileron normalization">
      <input>fcs/right-aileron-pos-rad</input>
      <zero_centered>true</zero_centered>
      <domain>
        <min> -0.35 </min>
        <max>  0.2618 </max>
      </domain>
      <range>
        <min> -1 </min>
        <max>  1 </max>
      </range>
      <output>fcs/right-aileron-pos-norm</output>
   </aerosurface_scale>

  </channel>

  <channel name="Stabilator">

   <scheduled_gain name="fcs/stabL-DM">
      <input>fcs/roll-trim-sum</input>
      <table>
        <independentVar lookup="row">fcs/roll-trim-sum</independentVar>
        <tableData>
          -1.0              0.142857143
          -0.9677419356     0.144666667
          -0.8870967743     0.156565657
          -0.806451613      0.16631746
          -0.7258064517     0.175393298
          -0.6451612904     0.183293651
          -0.5645161291     0.195419501
          -0.4838709678     0.206666667
          -0.4032258065     0.214146032
          -0.3225806452     0.223759398
          -0.2419354839     0.229974937
          -0.1612903226     0.237744361
          -0.0806451613     0.223759398
           0.0              0.00
           0.0806451613     0.522105263
           0.1612903226     0.554736842
           0.2419354839     0.536608187
           0.3225806452     0.522105263
           0.4032258065     0.499674074
           0.4838709678     0.482222222
           0.5645161291     0.455978836
           0.6451612904     0.427685185
           0.7258064517     0.409251029
           0.806451613      0.388074074
           0.8870967743     0.365319865
           0.9677419356     0.337555556
           1.0              0.333333333
        </tableData>
      </table>
   </scheduled_gain>

   <scheduled_gain name="fcs/stabR-DM">
      <input>fcs/roll-trim-sum</input>
      <table>
        <independentVar lookup="row">fcs/roll-trim-sum</independentVar>
        <tableData>
          -1.0             -0.333333333
          -0.9677419356    -0.337555556
          -0.8870967743    -0.365319865
          -0.806451613     -0.388074074
          -0.7258064517    -0.409251029
          -0.6451612904    -0.427685185
          -0.5645161291    -0.455978836
          -0.4838709678    -0.482222222
          -0.4032258065    -0.499674074
          -0.3225806452    -0.522105263
          -0.2419354839    -0.536608187
          -0.1612903226    -0.554736842
          -0.0806451613    -0.522105263
           0.0              0.00
           0.0806451613    -0.223759398
           0.1612903226    -0.237744361
           0.2419354839    -0.229974937
           0.3225806452    -0.223759398
           0.4032258065    -0.214146032
           0.4838709678    -0.206666667
           0.5645161291    -0.195419501
           0.6451612904    -0.183293651
           0.7258064517    -0.175393298
           0.806451613     -0.16631746
           0.8870967743    -0.156565657
           0.9677419356    -0.144666667
           1.0             -0.142857143
        </tableData>
      </table>
   </scheduled_gain>

   <switch name="systems/fcs/lsp">
    <default value="fcs/stabL-DM"/>
     <test value="0.0">
      fcs/LERX-pos-norm == 1
     </test>
    <output>fcs/left-eleron-pos-norma</output>
   </switch>
   <switch name="systems/fcs/rsp">
    <default value="fcs/stabR-DM"/>
     <test value="0.0">
      fcs/LERX-pos-norm == 1
     </test>
    <output>fcs/right-eleron-pos-norma</output>
   </switch>

   <summer name="Left Stabilator Sum">
      <input>fcs/left-eleron-pos-norma</input>
      <input>fcs/elevator-pos-norm</input>
      <clipto>
        <min> -1 </min>
        <max>  0.428548044 </max>
      </clipto>
   </summer>

   <summer name="Right Stabilator Sum">
      <input>fcs/right-eleron-pos-norma</input>
      <input>fcs/elevator-pos-norm</input>
      <clipto>
        <min> -1 </min>
        <max>  0.428548044 </max>
      </clipto>
   </summer>

   <switch name="fcs/left-stabilator-cmd-switched">
    <default value="fcs/elevator-pos-static"/>
    <test value="fcs/left-stabilator-sum">
     hs/busters-serviceable > 0
    </test>
   </switch>

   <switch name="fcs/right-stabilator-cmd-switched">
    <default value="fcs/elevator-pos-static"/>
    <test value="fcs/right-stabilator-sum">
     hs/busters-serviceable > 0
    </test>
   </switch>

   <aerosurface_scale name="left stabilator normalization">
      <input>fcs/left-stabilator-cmd-switched</input>
      <domain>
        <min> -1.0 </min>
        <max>  1.0 </max>
      </domain>
      <range>
        <min> -1 </min>
        <max>  1 </max>
      </range>
      <output>fcs/left-stabilator-pos-norm</output>
   </aerosurface_scale>

   <aerosurface_scale name="right stabilator normalization">
      <input>fcs/right-stabilator-cmd-switched</input>
      <domain>
        <min> -1.0 </min>
        <max>  1.0 </max>
      </domain>
      <range>
        <min> -1 </min>
        <max>  1 </max>
      </range>
      <output>fcs/right-stabilator-pos-norm</output>
   </aerosurface_scale>

  </channel>

  <property>fcs/met-yaw</property>

  <channel name="Yaw">

   <aerosurface_scale name="fcs/met-yaw-trimmer">
      <input>fcs/yaw-trim-cmd-norm</input>
      <domain>
        <min> -1 </min>
        <max>  1 </max>
      </domain>
      <range>
       <min> 0.555555556 </min>
       <max> 0.555555556 </max>
      </range>
      <output>fcs/met-yaw</output>
   </aerosurface_scale>

   <summer name="Rudder Command Sum">
      <input>fcs/rudder-cmd-norm</input>
      <input>fcs/met-yaw</input>
      <clipto>
        <min> -1.0 </min>
        <max>  1.0 </max>
      </clipto>
   </summer>

   <scheduled_gain name="Yaw Damper Rate">
      <input>velocities/r-aero-rad_sec</input>
      <table>
        <independentVar lookup="row">velocities/ve-kts</independentVar>
         <tableData>
            30     0.00
            60     2.00
         </tableData>
      </table>
   </scheduled_gain>

   <scheduled_gain name="Yaw Damper Beta">
      <input>aero/beta-rad</input>
      <table>
        <independentVar lookup="row">velocities/ve-kts</independentVar>
        <tableData>
           30     0.00
           60     0.00
        </tableData>
      </table>
   </scheduled_gain>

   <summer name="Yaw Damper Sum">
      <input>fcs/yaw-damper-beta</input>
      <input>fcs/yaw-damper-rate</input>
      <clipto>
        <min> -0.1 </min>
        <max>  0.1 </max>
      </clipto>
   </summer>

   <scheduled_gain name="Yaw Damper Final">
      <input>fcs/yaw-damper-sum</input>
      <table>
        <independentVar lookup="row">velocities/ve-kts</independentVar>
        <tableData>
           30         0.0
           31         1.0
        </tableData>
      </table>
   </scheduled_gain>

   <switch name="fcs/yaw-arm-150m-hydropower">
    <default value="0.0"/>
    <test value="fcs/sau-yaw">
     hs/arm-150m-yaw-serviceable > 0
    </test>
   </switch>

   <summer name="Rudder Sum">
      <input>fcs/rudder-command-sum</input>
      <input>fcs/yaw-damper-final</input>
      <input>fcs/yaw-arm-150m-hydropower</input>
      <clipto>
        <min> -1 </min>
        <max>  1 </max>
      </clipto>
   </summer>

   <switch name="fcs/yaw-hydropower">
    <default value="fcs/rudder-pos-static"/>
    <test value="fcs/rudder-sum">
     hs/busters-serviceable > 0
    </test>
   </switch>

   <switch name="fcs/rudder-cmd-switched">
    <default value="fcs/rudder-pos-static"/>
    <test value="fcs/rudder-sum">
     hs/busters-serviceable > 0
    </test>
   </switch>

   <aerosurface_scale name="Rudder Control">
      <input>fcs/yaw-hydropower</input>
      <domain>
       <min> -1.0 </min>
       <max>  1.0 </max>
      </domain>
      <range>
       <min> -0.436332313 </min>
       <max>  0.436332313 </max>
      </range>
      <output>fcs/rudder-pos-raw</output>
   </aerosurface_scale>

    <kinematic name="Rudder filter">
     <input>fcs/rudder-pos-raw</input>
      <traverse>
        <setting>
          <position>-1</position>
          <time>0</time>
        </setting>
        <setting>
          <position>1</position>
          <time>1</time>
        </setting>
      </traverse>
      <output>fcs/rudder-pos-rad</output>
    </kinematic>

   <aerosurface_scale name="rudder normalization">
      <input>fcs/rudder-pos-rad</input>
      <domain>
        <min> -0.436332313 </min>
        <max>  0.436332313 </max>
      </domain>
      <range>
        <min> -1 </min>
        <max>  1 </max>
      </range>
      <output>fcs/rudder-pos-norm</output>
   </aerosurface_scale>

  </channel>

  <property value="1">systems/gear/MRK</property>

  <channel name="SteerAngle">

   <switch name="fcs/steer-cmd-switched">
    <default value="fcs/steer-cmd-static"/>
    <test value="fcs/steer-cmd-norm">
     hs/steer-serviceable > 0
    </test>
   </switch>

   <aerosurface_scale name="steer rr">
      <input>fcs/steer-cmd-switched</input>
      <domain>
        <min> -1.0 </min>
        <max>  1.0 </max>
      </domain>
      <range>
        <min> -31 </min>
        <max>  31 </max>
      </range>
      <output>fcs/steer-rr-deg</output>
   </aerosurface_scale>

   <aerosurface_scale name="steer vpr">
      <input>fcs/steer-cmd-switched</input>
      <domain>
        <min> -1.0 </min>
        <max>  1.0 </max>
      </domain>
      <range>
        <min> -8 </min>
        <max>  8 </max>
      </range>
      <output>fcs/steer-vpr-deg</output>
   </aerosurface_scale>

   <switch name="calculations/gear/steer-rr-vpr">
    <default value="0"/>
     <test logic="AND" value="fcs/steer-rr-deg">
      systems/gear/vpr eq 0.0
      systems/gear/MRK eq 1.0
     </test>
     <test logic="AND" value="fcs/steer-vpr-deg">
      systems/gear/vpr eq 1.0
      systems/gear/MRK eq 1.0
     </test>
    <output>fcs/steer-pos-deg</output>
   </switch>

  </channel>

  <channel name="Flaps">

   <switch name="fcs/flap-cmd-switched">
    <default value="fcs/flap-cmd-static"/>
    <test value="fcs/flap-cmd-norm">
     hs/flaps-serviceable > 0
    </test>
   </switch>

   <kinematic name="Flaps Control">
     <input>fcs/flap-cmd-switched</input>
     <traverse>
       <setting>
          <position>  0 </position>
          <time>      0 </time>
       </setting>
       <setting>
          <position> 25 </position>
          <time>      5 </time>
       </setting>
     </traverse>
     <output>fcs/flap-pos-deg</output>
   </kinematic>

   <scheduled_gain name="Flap Float Pos Norm">
      <input>fcs/flap-pos-deg</input>
      <table>
        <independentVar lookup="row">aero/qbar-psf</independentVar>
         <tableData>
             0       1.0
           215.3     1.0
           230.9     0.916
           249.25    0.838
           268       0.786
           289.15    0.724
           311       0.6856
           329.5     0.6476
           351       0.614
           373.8     0.5908
           543.8     0
         </tableData>
      </table>
      <clipto>
        <min>  0 </min>
        <max>  25 </max>
      </clipto>
     <output>fcs/flap-float-pos-norm</output>
   </scheduled_gain>

   <aerosurface_scale name="flap normalization">
      <input>fcs/flap-float-pos-norm</input>
      <domain>
        <min>  0 </min>
        <max> 25 </max>
      </domain>
      <range>
        <min> 0 </min>
        <max> 1 </max>
      </range>
      <output>fcs/flap-pos-norm</output>
   </aerosurface_scale>

  </channel>

  <channel name="LERX">

   <switch name="fcs/LERX-cmd-switched">
    <default value="fcs/LERX-cmd-static"/>
    <test value="systems/COC/LERX-cmd">
     hs/LERX-serviceable > 0
    </test>
   </switch>

   <kinematic name="LERX Control">
     <input>fcs/LERX-cmd-switched</input>
     <traverse>
       <setting>
          <position>  0   </position>
          <time>      0   </time>
       </setting>
       <setting>
          <position> 20   </position>
          <time>      1.5 </time>
       </setting>
     </traverse>
     <output>fcs/LERX-pos-deg</output>
   </kinematic>

   <aerosurface_scale name="LERX normalization">
      <input>fcs/LERX-pos-deg</input>
      <domain>
        <min>   0 </min>
        <max> -20 </max>
      </domain>
      <range>
        <min>   0 </min>
        <max>  -1 </max>
      </range>
      <output>fcs/LERX-pos-norm</output>
   </aerosurface_scale>

  </channel>

  <property value="0">systems/engines/emerdisable_afterburning</property>
  <property value="1">systems/engines/cmd_t_L</property>
  <property value="1">systems/engines/cmd_t_R</property>

  <channel name="Throttle Control">

    <scheduled_gain name="Throttle1">
      <input>systems/engines/cmd_t_L</input>
        <table>
          <independentVar>fcs/throttle-cmd-norm[0]</independentVar>
          <tableData>
            0.00    0.0
            0.0685  0.0
            0.072   0.0
            0.828   1.0
            0.832   1.0
            1.00    2.0
          </tableData>
        </table>
      <output>fcs/throttle1-pos-norm</output>
    </scheduled_gain>
    <scheduled_gain name="Throttle2">
      <input>systems/engines/cmd_t_R</input>
        <table>
          <independentVar>fcs/throttle-cmd-norm[1]</independentVar>
          <tableData>
            0.00    0.0
            0.0685  0.0
            0.072   0.0
            0.828   1.0
            0.832   1.0
            1.00    2.0
          </tableData>
        </table>
      <output>fcs/throttle2-pos-norm</output>
    </scheduled_gain>

   <switch name="calculations/throttle1-pos-norm">
    <default value="fcs/throttle1-pos-norm"/>
    <test value="fcs/throttle-cmd-norm[0]">
     systems/engines/emerdisable_afterburning eq 1
    </test>
    <output>fcs/throttle-pos-norm[0]</output>
   </switch>
   <switch name="calculations/throttle2-pos-norm">
    <default value="fcs/throttle2-pos-norm"/>
    <test value="fcs/throttle-cmd-norm[1]">
     systems/engines/emerdisable_afterburning eq 1
    </test>
    <output>fcs/throttle-pos-norm[1]</output>
   </switch>

   </channel>

  <channel name="Landing Gear">

   <switch name="gear/gear-cmd-switched">
    <default value="gear/gear-cmd-static"/>
    <test logic="AND" value="gear/gear-cmd-norm">
     hs/gear-serviceable > 0
     systems/PS/EGE eq 0
    </test>
    <test value="1">
     systems/PS/EGE eq 1
    </test>
   </switch>

   <kinematic name="Gear Control">
     <input>gear/gear-cmd-switched</input>
     <traverse>
       <setting>
          <position> 0 </position>
          <time>     0 </time>
       </setting>
       <setting>
          <position> 1 </position>
          <time>     7 </time>
       </setting>
     </traverse>
     <output>gear/gear-pos-norm</output>
   </kinematic>

  </channel>

  <channel name="Speedbrake">

   <switch name="systems/speedbrake">
    <default value="0.0"/>
     <test value="fcs/speedbrake-cmd-norm">
      gear/gear-cmd-norm eq 0
     </test>
    <output>fcs/speedbrake-cmd</output>
   </switch>

   <switch name="fcs/speedbrake-cmd-switched">
    <default value="fcs/speedbrake-cmd-static"/>
    <test value="fcs/speedbrake-cmd">
     hs/LERX-serviceable > 0
    </test>
   </switch>

   <kinematic name="Speedbrake Control">
     <input>fcs/speedbrake-cmd-switched</input>
     <traverse>
       <setting>
          <position> 0 </position>
          <time>     0 </time>
       </setting>
       <setting>
          <position> 1 </position>
          <time>     1 </time>
       </setting>
     </traverse>
     <output>fcs/speedbrake-pos-deg</output>
   </kinematic>

   <scheduled_gain name="Speedbrake Float Pos Norm">
      <input>fcs/speedbrake-pos-deg</input>
      <table>
               <independentVar lookup="row">velocities/mach</independentVar>
               <independentVar lookup="column">position/h-sl-meters</independentVar>
               <tableData>
                          0          1000        5000        8000        10000       11000       13000
               0.0        1          1           1           1           1           1           1
               0.775      1          1           1           1           1           1           1
               0.8        0.7        1           1           1           1           1           1
               0.8238     0.45       1           1           1           1           1           1
               0.9        0.2375     0.37        0.935       0.935       0.935       0.935       0.935
               1.0        0.1225     0.185       0.92375     0.92375     0.92375     0.92375     0.92375
               1.0652     0.09175    0.1205      0.92375     0.92375     0.92375     0.92375     0.92375
               1.1        0.08       0.105       0.525       0.8985      0.8985      0.8985      0.8985
               1.2        0.05       0.0675      0.21        0.875       0.875       0.875       0.875
               1.3        0.04       0.0525      0.1125      0.8625      0.8625      0.8625      0.8625
               1.3095     0.04       0.0525      0.106       0.86        0.86        0.86        0.86
               1.4        0.04       0.0525      0.07        0.35        0.85        0.85        0.85
               1.5        0.04       0.045       0.045       0.18        0.84        0.84        0.84
               1.5263     0.04       0.044       0.044       0.155       0.839       0.839       0.839
               1.6        0.04       0.044       0.044       0.105       0.39475     0.835       0.835
               1.7        0.04       0.044       0.044       0.075       0.21        0.375       0.83
               1.8        0.04       0.044       0.044       0.051       0.12        0.2375      0.82
               1.8348     0.04       0.0425      0.0425      0.0425      0.101       0.1975      0.82
               1.9        0.04       0.0425      0.030525    0.030525    0.08        0.16        0.5
               2.0        0.04       0.0425      0.030525    0.030525    0.065       0.1155      0.35
               2.1        0.04       0.0425      0.030525    0.030525    0.052       0.085       0.225
               2.2        0.04       0.0425      0.030525    0.030525    0.0457      0.065       0.14
               2.3        0.04       0.0425      0.030525    0.030525    0.0457      0.0525      0.1085
               2.4        0.04       0.0425      0.030525    0.030525    0.0457      0.04        0.08
         </tableData>
      </table>
     <output>fcs/speedbrake-float-pos-norm</output>
   </scheduled_gain>

   <aerosurface_scale name="speedbrake normalization">
      <input>fcs/speedbrake-float-pos-norm</input>
      <domain>
        <min>  0 </min>
        <max>  1 </max>
      </domain>
      <range>
        <min> 0 </min>
        <max> 1 </max>
      </range>
      <output>fcs/speedbrake-pos-norm</output>
   </aerosurface_scale>

  </channel>

  <property>fcs/parachute_reef-cmd-norm</property>
  <property value="0">systems/parachute/drop_cmd</property>

  <channel name="Drag Parachute">

   <kinematic name="Parachute Control">
     <input>fcs/parachute_reef-cmd-norm</input>
     <traverse>
       <setting>
          <position> 0 </position>
          <time>     0 </time>
       </setting>
       <setting>
          <position> 1 </position>
          <time>   0.9 </time>
       </setting>
     </traverse>
     <output>fcs/parachute_reef_pos</output>
   </kinematic>

   <switch name="systems/parachute/release_drop">
    <default value="fcs/parachute_reef_pos"/>
    <test logic="AND" value="0.0">
     fcs/parachute_reef_pos eq 1
     systems/parachute/drop_cmd eq 1
    </test>
     <test logic="AND" value="0.0">
      fcs/parachute_reef_pos eq 1
      velocities/vc-fps gt 314.413823272
     </test>
    <output>fcs/parachute_reef_pos_norm</output>
   </switch>

  </channel>

  <channel name="Intake">

   <switch name="systems/ARV/command-left-switched">
    <default value="systems/ARV/command-left-static"/>
    <test value="systems/ARV/command_left_norm">
     hs/intake1-serviceable > 0
    </test>
   </switch>

   <switch name="systems/ARV/command-right-switched">
    <default value="systems/ARV/command-right-static"/>
    <test value="systems/ARV/command_right_norm">
     hs/intake2-serviceable > 0
    </test>
   </switch>

<!-- Клин левого воздухозаборника 0,695081967-->
   <kinematic name="Ramp Left Control">
     <input>systems/ARV/command-left-switched</input>
     <traverse>
       <setting>
          <position>  0 </position>
          <time>      0 </time>
       </setting>
       <setting>
          <position>  1.438679245 </position>
          <time>      2 </time>
       </setting>
     </traverse>
     <output>systems/intake/pos-left</output>
   </kinematic>
<!-- Клин правого воздухозаборника 1,438679245-->
   <kinematic name="Ramp Right Control">
     <input>systems/ARV/command-right-switched</input>
     <traverse>
       <setting>
          <position>  0 </position>
          <time>      0 </time>
       </setting>
       <setting>
          <position>  1.438679245 </position>
          <time>      2 </time>
       </setting>
     </traverse>
     <output>systems/intake/pos-right</output>
   </kinematic>

  </channel>

 </flight_control>

        <system file="ARV-29">
        </system>

 <aerodynamics>

<!-- 0.6 = 8.5 -0.51957 14.3 -0.82836 28.6 -1.50588 43 -2 -->
<!-- 0.8 = 8.5 -0.58999 14.3 -0.86344 28.6 -1.77851 43 -2.6 -->
<!-- 2.0 = 8.5 -0.37553 14.3 -0.62473 28.6 -1.15764 43 -1.8 -->

  <axis name="LIFT">

    <function name="aero/coefficient/CLalpha">
      <description>Lift_due_to_alpha</description>
      <product>
          <property>aero/qbar-psf</property>
          <property>metrics/Sw-sqft</property>
          <table name="lift due to alpha">
               <independentVar lookup="row">aero/alpha-deg</independentVar>
               <independentVar lookup="column">velocities/mach</independentVar>
               <tableData>
                               0.6           0.8           2.0
                 -43.0        -1.0          -1.3          -0.9
                 -28.6        -0.753        -0.89         -0.58
                 -14.3        -0.414        -0.4317       -0.3125
                  -8.5        -0.26         -0.295        -0.185
                   0.0         0.0           0.0           0.0
                   2.5         0.160408163   0.188769841   0.113718821
                   5.0         0.320821995   0.368650794   0.227437642
                   7.5         0.464387755   0.53068869    0.332619048
                  10.0         0.602301232   0.681898096   0.439608844
                  12.5         0.737793953   0.830979843   0.548057111
                  15.0         0.863964166   0.968131645   0.655767077
                  17.5         0.982385218   1.105283447   0.746466965
                  20.0         1.098441043   1.228174603   0.837161254
                  22.5         1.212409297   1.341326531   0.9
                  25.0         1.319160998   1.441411565   1.0
                  27.5         1.411150794   1.53776644    1.0
		              30.0         1.5           1.631099773   1.0
		              32.5         1.6           1.7           1.0
               </tableData>
          </table>
      </product>
    </function>

    <function name="aero/coefficient/dCLflap">
       <description>Delta_Lift_due_to_flaps</description>
       <product>
           <property>aero/qbar-psf</property>
           <property>metrics/Sw-sqft</property>
           <property>fcs/flap-pos-norm</property>
           <value> 0.2 </value>
       </product>
    </function>

    <function name="aero/coefficient/dCLsb">
       <description>Delta_Lift_due_to_speedbrake</description>
       <product>
           <property>aero/qbar-psf</property>
           <property>metrics/Sw-sqft</property>
           <property>fcs/speedbrake-pos-norm</property>
           <value>0</value>
       </product>
    </function>

    <function name="aero/coefficient/CLde">
       <description>Lift_due_to_Elevator_Deflection</description>
       <product>
           <property>aero/qbar-psf</property>
           <property>metrics/Sw-sqft</property>
           <property>fcs/elevator-pos-rad</property>
           <value>0.2</value>
       </product>
    </function>

    <function name="aero/coefficient/CLground">
       <description>Lift near ground</description>
       <product>
          <table name="Delta lift due ground reaction">
            <independentVar lookup="row">aero/alpha-rad</independentVar>
            <independentVar lookup="column">position/h-agl-ft</independentVar>
            <tableData>
                             0       10       27
                0            0.07    0.04     0
                0.104719755  0.08    0.05     0
                0.174532925  0.1     0.625    0
                0.244346095  0.1     0.625    0
            </tableData>
          </table>
          <property>aero/qbar-psf</property>
          <property>metrics/Sw-sqft</property>
       </product>
    </function>

  </axis>

 <property value="0">systems/podv/PTB</property>
 <property value="0">systems/podv/APU-470_1</property>
 <property value="0">systems/podv/APU-470_2</property>
 <property value="0">systems/podv/APU-60_1</property>
 <property value="0">systems/podv/APU-60_2</property>
 <property value="0">systems/podv/APU-60_3</property>
 <property value="0">systems/podv/APU-60_4</property>
 <property value="0">systems/podv/APU-60_5</property>
 <property value="0">systems/podv/APU-60_6</property>
 <property value="0">systems/podv/APU-73_1</property>
 <property value="0">systems/podv/APU-73_2</property>
 <property value="0">systems/podv/APU-73_3</property>
 <property value="0">systems/podv/APU-73_4</property>
 <property value="0">systems/podv/APU-73_5</property>
 <property value="0">systems/podv/APU-73_6</property>
 <property value="0">systems/podv/BD3-UMK_1</property>
 <property value="0">systems/podv/BD3-UMK_2</property>
 <property value="0">systems/podv/BD3-UMK_3</property>
 <property value="0">systems/podv/BD3-UMK_4</property>
 <property value="0">systems/podv/MBD3-U2T_1</property>
 <property value="0">systems/podv/MBD3-U2T_2</property>
 <property value="0">systems/podv/MBD3-U2T_3</property>
 <property value="0">systems/podv/MBD3-U2T_4</property>
 <property value="0">systems/podv/APU-68_1</property>
 <property value="0">systems/podv/APU-68_2</property>
 <property value="0">systems/podv/APU-68_3</property>
 <property value="0">systems/podv/APU-68_4</property>
 <property value="0">systems/podv/B-8M1_1</property>
 <property value="0">systems/podv/B-8M1_2</property>
 <property value="0">systems/podv/B-8M1_3</property>
 <property value="0">systems/podv/B-8M1_4</property>
 <property value="0">systems/podv/R-27R_1</property>
 <property value="0">systems/podv/R-27R_2</property>
 <property value="0">systems/podv/R-60M_1</property>
 <property value="0">systems/podv/R-60M_2</property>
 <property value="0">systems/podv/R-60M_3</property>
 <property value="0">systems/podv/R-60M_4</property>
 <property value="0">systems/podv/R-60M_5</property>
 <property value="0">systems/podv/R-60M_6</property>
 <property value="0">systems/podv/R-73_1</property>
 <property value="0">systems/podv/R-73_2</property>
 <property value="0">systems/podv/R-73_3</property>
 <property value="0">systems/podv/R-73_4</property>
 <property value="0">systems/podv/R-73_5</property>
 <property value="0">systems/podv/R-73_6</property>

 <property value="0">systems/podv/S-24B_1</property>
 <property value="0">systems/podv/S-24B_2</property>
 <property value="0">systems/podv/S-24B_3</property>
 <property value="0">systems/podv/S-24B_4</property>

    <function name="aero/coefficient/CDDt">
       <description>Drag_due_to_Droptank</description>
       <product>
          <property>systems/podv/PTB</property>
          <table>
            <independentVar lookup="row">velocities/mach</independentVar>
            <tableData>
               0.00       0.0022
               0.55       0.0022
               0.60       0.00225
               0.62       0.0023
               0.70       0.0027
               0.80       0.0033
               1.00       0.005
               1.03       0.0055
               1.07       0.0056
               1.12       0.0053
            </tableData>
          </table>
       </product>
    </function>

    <function name="aero/coefficient/CDAPU470">
       <description>Drag_due_to_APU_470</description>
       <product>
          <sum>
            <property>systems/podv/APU-470_1</property>
            <property>systems/podv/APU-470_2</property>
          </sum>
          <table>
            <independentVar lookup="row">velocities/mach</independentVar>
            <tableData>
               0.00       0.000375
               0.55       0.000375
               0.60       0.00037
               0.74       0.00037
               0.82       0.000375
               0.90       0.00039
               1.00       0.0005
               1.05       0.0006
               1.10       0.00065
               1.20       0.000685
               1.27       0.0007
               1.40       0.00064
               2.20       0.000575
               3.00       0.000575
            </tableData>
          </table>
       </product>
    </function>

    <function name="aero/coefficient/CDAPU73">
       <description>Drag_due_to_APU_73</description>
       <product>
          <sum>
            <property>systems/podv/APU-73_1</property>
            <property>systems/podv/APU-73_2</property>
            <property>systems/podv/APU-73_3</property>
            <property>systems/podv/APU-73_4</property>
            <property>systems/podv/APU-73_5</property>
            <property>systems/podv/APU-73_6</property>
          </sum>
          <table>
            <independentVar lookup="row">velocities/mach</independentVar>
            <tableData>
               0.00       0.000237536
               0.55       0.000237536
               0.60       0.000234369
               0.74       0.000234369
               0.82       0.000237536
               0.90       0.000247038
               1.00       0.000316715
               1.05       0.000380058
               1.10       0.00041173
               1.20       0.0004339
               1.27       0.000443402
               1.40       0.000405396
               2.20       0.000364223
               3.00       0.000364223
            </tableData>
          </table>
       </product>
    </function>

    <function name="aero/coefficient/CDAPU60">
       <description>Drag_due_to_APU_60</description>
       <product>
          <sum>
            <property>systems/podv/APU-60_1</property>
            <property>systems/podv/APU-60_2</property>
            <property>systems/podv/APU-60_3</property>
            <property>systems/podv/APU-60_4</property>
            <property>systems/podv/APU-60_5</property>
            <property>systems/podv/APU-60_6</property>
          </sum>
          <table>
            <independentVar lookup="row">velocities/mach</independentVar>
            <tableData>
               0.00       0.00018695
               0.55       0.00018695
               0.60       0.000184457
               0.74       0.000184457
               0.82       0.00018695
               0.90       0.000194428
               1.00       0.000249267
               1.05       0.00029912
               1.10       0.000324047
               1.20       0.000341495
               1.27       0.000348973
               1.40       0.000319061
               2.20       0.000286657
               3.00       0.000286657
            </tableData>
          </table>
       </product>
    </function>

    <function name="aero/coefficient/CDR27">
       <description>Drag_due_to_R_27R</description>
       <product>
          <sum>
            <property>systems/podv/R-27R_1</property>
            <property>systems/podv/R-27R_2</property>
          </sum>
          <table>
            <independentVar lookup="row">velocities/mach</independentVar>
            <tableData>
               0.00       0.000825
               0.55       0.000825
               0.65       0.00087
               0.72       0.00088
               0.80       0.0009625
               0.85       0.000980625
               0.90       0.00106
               0.95       0.001305
               0.98       0.00176
               1.00       0.001875
               1.04       0.001875
               1.10       0.001885
               1.14       0.001865
               1.80       0.0016425
               2.20       0.00155
               3.00       0.00155
            </tableData>
          </table>
       </product>
    </function>

    <function name="aero/coefficient/CDR73">
       <description>Drag_due_to_R_73</description>
       <product>
          <sum>
            <property>systems/podv/R-73_1</property>
            <property>systems/podv/R-73_2</property>
            <property>systems/podv/R-73_3</property>
            <property>systems/podv/R-73_4</property>
            <property>systems/podv/R-73_5</property>
            <property>systems/podv/R-73_6</property>
          </sum>
          <table>
            <independentVar lookup="row">velocities/mach</independentVar>
            <tableData>
               0.00       0.000609782
               0.55       0.000609782
               0.65       0.000643043
               0.72       0.000650435
               0.80       0.000711413
               0.85       0.00072481
               0.90       0.000783478
               0.95       0.000964565
               0.98       0.001300869
               1.00       0.001385869
               1.04       0.001385869
               1.10       0.001393261
               1.14       0.001378478
               1.80       0.001214021
               2.20       0.001145652
               3.00       0.001145652
            </tableData>
          </table>
       </product>
    </function>

    <function name="aero/coefficient/CDR60">
       <description>Drag_due_to_R_60M</description>
       <product>
          <sum>
            <property>systems/podv/R-60M_1</property>
            <property>systems/podv/R-60M_2</property>
            <property>systems/podv/R-60M_3</property>
            <property>systems/podv/R-60M_4</property>
            <property>systems/podv/R-60M_5</property>
            <property>systems/podv/R-60M_6</property>
          </sum>
          <table>
            <independentVar lookup="row">velocities/mach</independentVar>
            <tableData>
               0.00       0.000430435
               0.55       0.000430435
               0.65       0.000453913
               0.72       0.00045913
               0.80       0.000502174
               0.85       0.00051163
               0.90       0.000553043
               0.95       0.00068087
               0.98       0.000918261
               1.00       0.000978261
               1.04       0.000978261
               1.10       0.000983478
               1.14       0.000973043
               1.80       0.000856957
               2.20       0.000808696
               3.00       0.000808696
            </tableData>
          </table>
       </product>
    </function>

    <function name="aero/coefficient/CDpodv">
       <description>Summer _podv_ drag</description>
       <sum>
        <property>aero/coefficient/CDDt</property>
        <property>aero/coefficient/CDAPU470</property>
        <property>aero/coefficient/CDAPU73</property>
        <property>aero/coefficient/CDAPU60</property>
        <property>aero/coefficient/CDR27</property>
        <property>aero/coefficient/CDR73</property>
        <property>aero/coefficient/CDR60</property>
       </sum>
    </function>

  <axis name="DRAG">

    <function name="aero/coefficient/CD0">
       <description>Drag_at_zero_lift</description>
       <product>

          <property>aero/qbar-psf</property>
          <property>metrics/Sw-sqft</property>
          <table>
            <independentVar lookup="row">aero/alpha-rad</independentVar>
            <independentVar lookup="column">velocities/mach</independentVar>
            <!--<tableData>
                               0.8           1.2           1.5           2.5
                 0.000         0.0           0.0           0.0           0.0
                 0.017         0.005341518   0.013852363   0.013088074   0.011344608
                 0.035         0.005361581   0.016212913   0.014927111   0.013494104
                 0.052         0.006720784   0.019823202   0.017612591   0.016912751
                 0.070         0.008526367   0.025077551   0.02239483    0.021111787
                 0.087         0.01014387    0.0303319     0.027465886   0.024960915
                 0.105         0.012007131   0.037377488   0.032242558   0.019968732
                 0.122         0.014921143   0.045139592   0.038452236   0.03398605
                 0.140         0.018502217   0.055753816   0.046852213   0.040124082
                 0.157         0.022670106   0.065201633   0.054120841   0.045139592
                 0.175         0.027209143   0.073799646   0.061352504   0.051256057
		 0.192         0.028907729   0.078012082   0.076292472   0.059708446
		 0.209         0.039998694   0.092906358   0.077740408   0.059708446
		 0.227         0.046879974   0.100310204   0.077740408   0.059708446
		 0.244         0.053134315   0.103735422   0.077740408   0.059708446
		 0.262         0.061254426   0.112913278   0.077740408   0.059708446
		 0.279         0.067701864   0.114713722   0.077740408   0.059708446
		 0.297         0.074121467   0.114713722   0.077740408   0.059708446
		 0.314         0.082510158   0.114713722   0.077740408   0.059708446
                 0.332         0.08940147    0.114713722   0.077740408   0.059708446
                 0.349         0.097426286   0.114713722   0.077740408   0.059708446
                 0.367         0.074560933   0.114713722   0.077740408   0.059708446
                 0.384         0.112061544   0.114713722   0.077740408   0.059708446
                 0.401         0.120773486   0.114713722   0.077740408   0.059708446
                 0.419         0.129024      0.114713722   0.077740408   0.059708446
                 0.436         0.136547266   0.114713722   0.077740408   0.059708446
                 0.453         0.109237813   0.114713722   0.077740408   0.059708446
            </tableData>-->

            <tableData>
                               0.8           1.2           1.5           2.5
                 0.000         0.0           0.0           0.0           0.0
                 0.017         0.004273214   0.01108189    0.010470459   0.009075686
                 0.035         0.004289265   0.01297033    0.011941689   0.010795283
                 0.052         0.005376627   0.015858562   0.014090073   0.013530201
                 0.070         0.006821094   0.020062041   0.017915864   0.01688943
                 0.087         0.008115096   0.02426552    0.021972709   0.019968732
                 0.105         0.009605705   0.02990199    0.025794046   0.015974986
                 0.122         0.011936914   0.036111674   0.030761789   0.02718884
                 0.140         0.014801774   0.044603053   0.03748177    0.032099266
                 0.157         0.018136085   0.052161306   0.043296673   0.036111674
                 0.175         0.021767314   0.059039717   0.049082003   0.041004846
		 0.192         0.023126183   0.062409666   0.061033978   0.047766757
		 0.209         0.031998955   0.074325086   0.062192326   0.047766757
		 0.227         0.037503979   0.080248163   0.062192326   0.047766757
		 0.244         0.042507452   0.082988338   0.062192326   0.047766757
		 0.262         0.049003541   0.090330622   0.062192326   0.047766757
		 0.279         0.054161491   0.091770978   0.062192326   0.047766757
		 0.297         0.059297174   0.091770978   0.062192326   0.047766757
		 0.314         0.066008126   0.091770978   0.062192326   0.047766757
                 0.332         0.071521176   0.091770978   0.062192326   0.047766757
                 0.349         0.077941029   0.091770978   0.062192326   0.047766757
                 0.367         0.059648746   0.091770978   0.062192326   0.047766757
                 0.384         0.089649235   0.091770978   0.062192326   0.047766757
                 0.401         0.096618789   0.091770978   0.062192326   0.047766757
                 0.419         0.1032192     0.091770978   0.062192326   0.047766757
                 0.436         0.109237813   0.091770978   0.062192326   0.047766757
                 0.453         0.08739025    0.091770978   0.062192326   0.047766757
            </tableData>
          </table>
       </product>
    </function>

    <function name="aero/coefficient/CDi">
       <description>Induced_drag</description>
         <product>
           <property>aero/qbar-psf</property>
           <property>metrics/Sw-sqft</property>
           <property>aero/cl-squared</property>
          <table>
            <independentVar lookup="row">aero/alpha-rad</independentVar>
            <tableData>
                 0.000         0.0
                 0.017         0.0
                 0.035         0.000292683
                 0.052         0.002341463
                 0.070         0.004682927
                 0.087         0.011428571
                 0.105         0.018285714
                 0.122         0.027428571
                 0.140         0.039619048
                 0.157         0.0512
                 0.175         0.067809524
		 0.192         0.0888
		 0.209         0.10666666
		 0.227         0.128
		 0.244         0.1472
		 0.262         0.1752
		 0.279         0.195809524
		 0.297         0.215272727
		 0.314         0.2424
                 0.332         0.2664
                 0.349         0.2896
                 0.367         0.32
                 0.384         0.3248
                 0.401         0.364
                 0.419         0.3984
                 0.436         0.416
                 0.453         0.432
            </tableData>
          </table>
         </product>
    </function>

    <function name="aero/coefficient/CDmach">
       <description>Drag_due_to_mach</description>
        <product>
          <property>aero/qbar-psf</property>
          <property>metrics/Sw-sqft</property>
          <table>
            <independentVar lookup="row">velocities/mach</independentVar>
            <independentVar lookup="column">fcs/LERX-pos-norm</independentVar>
            <tableData>
                          0             1
                0.00      0.024525957   0.032597171
                0.10      0.242276206   0.032054742
                0.20      0.023808819   0.031489185
                0.30      0.023513145   0.030961231
                0.40      0.0232198     0.03065208
                0.50      0.023034276   0.030503661
                0.52      0.023018036   0.03053827
                0.54      0.023001797   0.030630449
                0.55      0.022993677   0.030700083
                0.56      0.022979501   0.030769717
                0.58      0.022951148   0.030987521
                0.60      0.022922795   0.03122629
                0.65      0.022906822   0.031991181
                0.70      0.022936273   0.032944426
                0.75      0.023080865   0.034121631
                0.775     0.023243594   0.034849917
                0.80      0.023521464   0.035578203
                0.825     0.023829285   0.036410233
                0.85      0.024264892   0.037242263
                0.875     0.024930782   0.038074293
                0.90      0.025681697   0.038906323
                0.925     0.026969717   0.039179743
                0.95      0.028470715   0.039453162
                0.975     0.030654077   0.039726581
                1.00      0.033221963   0.04
                1.05      0.0383203     0.0383203
                1.10      0.042847754   0.042847754
                1.15      0.045994842   0.045994842
                1.175     0.047205491   0.047205491
                1.20      0.048173544   0.048173544
                1.225     0.048722296   0.048722296
                1.25      0.049090017   0.049090017
                1.275     0.049202329   0.049202329
                1.30      0.049115474   0.049115474
                1.35      0.048857737   0.048857737
                1.40      0.0485797     0.485797
                1.45      0.048116805   0.048116805
                1.50      0.047634443   0.047634443
                1.60      0.046517637   0.046517637
                1.70      0.045469884   0.045469884
                1.80      0.044341764   0.044341764
                1.90      0.04317787    0.04317787
                2.00      0.042         0.042
                2.10      0.041         0.041
                2.20      0.04          0.04
                2.30      0.039         0.039
                2.40      0.038         0.038
                2.50      0.037         0.037
            </tableData>
          </table>
        </product>
    </function>

    <function name="aero/coefficient/CDflap">
       <description>Drag_due_to_flaps</description>
         <product>
           <property>aero/qbar-psf</property>
           <property>metrics/Sw-sqft</property>
           <property>fcs/flap-pos-deg</property>
           <value> 0.00250 </value>
         </product>
    </function>

    <function name="aero/coefficient/CDgear">
       <description>Drag_due_to_gear</description>
         <product>
           <property>aero/qbar-psf</property>
           <property>metrics/Sw-sqft</property>
           <property>gear/gear-pos-norm</property>
           <value>0.03</value>
         </product>
    </function>

    <function name="aero/coefficient/CDsb">
       <description>Drag_due_to_speedbrakes</description>
         <product>
           <property>aero/qbar-psf</property>
           <property>metrics/Sw-sqft</property>
           <property>fcs/speedbrake-pos-norm</property>
           <value>0.04</value>
         </product>
    </function>

    <function name="aero/coefficient/CDbeta">
       <description>Drag_due_to_sideslip</description>
       <product>
          <property>aero/qbar-psf</property>
          <property>metrics/Sw-sqft</property>
          <table>
            <independentVar lookup="row">aero/beta-rad</independentVar>
            <tableData>
              -1.57       1.230
              -0.26       0.050
               0.00       0.000
               0.26       0.050
               1.57       1.230
            </tableData>
          </table>
       </product>
    </function>

    <function name="aero/coefficient/CDde">
       <description>Drag_due_to_Elevator_Deflection</description>
       <product>
           <property>aero/qbar-psf</property>
           <property>metrics/Sw-sqft</property>
           <abs><property>fcs/elevator-pos-norm</property></abs>
           <value>0.04</value>
       </product>
    </function>

  </axis>

  <axis name="SIDE">

    <function name="aero/coefficient/CYb">
       <description>Side_force_due_to_beta</description>
       <product>
           <property>aero/qbar-psf</property>
           <property>metrics/Sw-sqft</property>
           <property>aero/beta-rad</property>
           <value>-1</value>
       </product>
    </function>

  </axis>

    <function name="aero/coefficient/Crit">
       <description>Roll_different_intake</description>
       <difference>
          <property>systems/intake/pos-left</property>
          <property>systems/intake/pos-right</property>
       </difference>
    </function>

  <axis name="ROLL">

    <function name="aero/coefficient/Clb">
       <description>Roll_moment_due_to_beta</description>
       <product>
           <property>aero/qbar-psf</property>
           <property>metrics/Sw-sqft</property>
           <property>metrics/bw-ft</property>
           <property>aero/beta-rad</property>
           <value>-0.1</value>
       </product>
    </function>

    <function name="aero/coefficient/Clp">
       <description>Roll_moment_due_to_roll_rate</description>
       <product>
           <property>aero/qbar-psf</property>
           <property>metrics/Sw-sqft</property>
           <property>metrics/bw-ft</property>
           <property>aero/bi2vel</property>
           <property>velocities/p-aero-rad_sec</property>
           <value>-0.4</value>
       </product>
    </function>

    <function name="aero/coefficient/Clr">
       <description>Roll_moment_due_to_yaw_rate</description>
       <product>
           <property>aero/qbar-psf</property>
           <property>metrics/Sw-sqft</property>
           <property>metrics/bw-ft</property>
           <property>aero/bi2vel</property>
           <property>velocities/r-aero-rad_sec</property>
           <value>0.15</value>
       </product>
    </function>

    <function name="aero/coefficient/Clda">
       <description>Roll_moment_due_to_aileron</description>
       <product>
          <property>aero/qbar-psf</property>
          <property>metrics/Sw-sqft</property>
          <property>metrics/bw-ft</property>
          <property>fcs/left-aileron-pos-rad</property>
          <table>
            <independentVar lookup="row">velocities/mach</independentVar>
            <tableData>
              0.0    0.120
              1.0    0.100
              2.0    0.040
              3.0    0.040
            </tableData>
          </table>
       </product>
    </function>

    <function name="aero/coefficient/Cldlsta">
       <description>Roll_moment_due_to_left_stabilator</description>
       <product>
          <property>aero/qbar-psf</property>
          <property>metrics/Sw-sqft</property>
          <property>metrics/bw-ft</property>
          <property>fcs/left-eleron-pos-norma</property>
          <value>0.5</value>
          <table>
            <independentVar lookup="row">velocities/mach</independentVar>
            <tableData>
              0.0    0.120
              1.0    0.100
              2.0    0.040
              3.0    0.040
            </tableData>
          </table>
       </product>
    </function>

    <function name="aero/coefficient/Cldrsta">
       <description>Roll_moment_due_to_right_stabilator</description>
       <product>
          <property>aero/qbar-psf</property>
          <property>metrics/Sw-sqft</property>
          <property>metrics/bw-ft</property>
          <property>fcs/right-eleron-pos-norma</property>
          <value>-0.5</value>
          <table>
            <independentVar lookup="row">velocities/mach</independentVar>
            <tableData>
              0.0    0.120
              1.0    0.100
              2.0    0.040
              3.0    0.040
            </tableData>
          </table>
       </product>
    </function>

    <function name="aero/coefficient/Cldr">
       <description>Roll_moment_due_to_rudder</description>
       <product>
           <property>aero/qbar-psf</property>
           <property>metrics/Sw-sqft</property>
           <property>metrics/bw-ft</property>
           <property>fcs/rudder-pos-rad</property>
           <value>0.01</value>
       </product>
    </function>

  </axis>

    <function name="aero/coefficient/Cpit">
       <description>Pitch_sum_intake</description>
       <sum>
          <property>systems/intake/pos-left</property>
          <property>systems/intake/pos-right</property>
       </sum>
    </function>

  <axis name="PITCH">

    <function name="aero/coefficient/Cmalpha">
       <description>Pitch_moment_due_to_alpha</description>
       <product>
           <property>aero/qbar-psf</property>
           <property>metrics/Sw-sqft</property>
           <property>metrics/cbarw-ft</property>
           <property>aero/alpha-rad</property>
           <table>
            <independentVar lookup="row">aero/alpha-rad</independentVar>
            <independentVar lookup="column">velocities/mach</independentVar>
            <tableData>
                                0.0        0.7        0.75       2.5
             -0.1               0.025      0.025      0.025      0.025
              0.0               0.0        0.0        0.0        0.0
              0.0872664626     -0.023659  -0.023659  -0.023659  -0.023659
              0.244346095279   -0.113171  -0.113171  -0.113171  -0.113171
              0.331612557879   -0.113171  -0.113171  -0.101951  -0.101951
              0.436332313      -0.113171  -0.113171  -0.092823  -0.092823
            </tableData>
           </table>
       </product>
    </function>

    <function name="aero/coefficient/Cmde">
       <description>Pitch_moment_due_to_elevator</description>
       <product>
          <property>aero/qbar-psf</property>
          <property>metrics/Sw-sqft</property>
          <property>metrics/cbarw-ft</property>
          <property>fcs/elevator-pos-rad</property>
          <table>
            <independentVar lookup="row">velocities/mach</independentVar>
            <tableData>
              0.0     -0.800
              0.9     -0.800
              2.0     -0.400
              3.0     -0.400
            </tableData>
          </table>
       </product>
    </function>

    <!--function name="aero/coefficient/CmdLERX">
       <description>Pitch_moment_due_to_LERX</description>
       <product>
          <property>aero/qbar-psf</property>
          <property>metrics/Sw-sqft</property>
          <property>metrics/cbarw-ft</property>
          <property>fcs/LERX-pos-norm</property>
          <table>
            <independentVar lookup="row">velocities/mach</independentVar>
            <tableData>
              0.0      -0.048869219
              0.9      -0.048869219
              1.0      -0.027
            </tableData>
          </table>
       </product>
    </function-->

    <function name="aero/coefficient/CmdSb">
       <description>Pitch_moment_due_to_Speedbrake</description>
       <product>
          <property>aero/qbar-psf</property>
          <property>metrics/Sw-sqft</property>
          <property>metrics/cbarw-ft</property>
          <property>fcs/speedbrake-pos-norm</property>
          <table>
            <independentVar lookup="row">velocities/mach</independentVar>
            <independentVar lookup="column">systems/podv/PTB</independentVar>
            <tableData>
                       0          1
              0.0      0.0        0.12
              0.9      0.0        0.12
              2.0      0.0        0.11
            </tableData>
          </table>
       </product>
    </function>

    <function name="aero/coefficient/Cmdit">
       <description>Pitch_moment_due_to_intake</description>
       <product>
          <property>aero/qbar-psf</property>
          <property>metrics/cbarw-ft</property>
          <property>aero/coefficient/Cpit</property>
          <table>
            <independentVar lookup="row">velocities/mach</independentVar>
            <tableData>
              0.0      10.0
              1.0      10.0
            </tableData>
          </table>
       </product>
    </function>

    <function name="aero/coefficient/Cmq">
       <description>Pitch_moment_due_to_pitch_rate</description>
       <product>
           <property>aero/qbar-psf</property>
           <property>metrics/Sw-sqft</property>
           <property>metrics/cbarw-ft</property>
           <property>aero/ci2vel</property>
           <property>velocities/q-aero-rad_sec</property>
           <value>-18</value>
       </product>
    </function>

    <function name="aero/coefficient/Cmadot">
       <description>Pitch_moment_due_to_alpha_rate</description>
       <product>
           <property>aero/qbar-psf</property>
           <property>metrics/Sw-sqft</property>
           <property>metrics/cbarw-ft</property>
           <property>aero/ci2vel</property>
           <property>aero/alphadot-rad_sec</property>
           <value>-9</value>
       </product>
    </function>

  </axis>

  <axis name="YAW">

    <function name="aero/coefficient/Cnb">
       <description>Yaw_moment_due_to_beta</description>
       <product>
           <property>aero/qbar-psf</property>
           <property>metrics/Sw-sqft</property>
           <property>metrics/bw-ft</property>
           <property>aero/beta-rad</property>
           <value>0.12</value>
       </product>
    </function>

    <function name="aero/coefficient/Cnr">
       <description>Yaw_moment_due_to_yaw_rate</description>
       <product>
           <property>aero/qbar-psf</property>
           <property>metrics/Sw-sqft</property>
           <property>metrics/bw-ft</property>
           <property>aero/bi2vel</property>
           <property>velocities/r-aero-rad_sec</property>
           <value>-0.15</value>
       </product>
    </function>

    <function name="aero/coefficient/Cndr">
       <description>Yaw_moment_due_to_rudder</description>
       <product>
           <property>aero/qbar-psf</property>
           <property>metrics/Sw-sqft</property>
           <property>metrics/bw-ft</property>
           <property>fcs/rudder-pos-rad</property>
           <value>-0.1</value>
       </product>
    </function>

    <function name="aero/coefficient/Cnda">
       <description>Adverse_yaw</description>
       <product>
           <property>aero/qbar-psf</property>
           <property>metrics/Sw-sqft</property>
           <property>metrics/bw-ft</property>
           <property>fcs/left-aileron-pos-rad</property>
           <value>0</value>
       </product>
    </function>

  </axis>

 </aerodynamics>

 <system file="Canopy">
 </system>
 <system file="SVS"><!-- Система воздушных сигналов -->
 </system>
 <system file="UMS">
 </system>
 <system file="PS"><!-- Пневматическая система -->
 </system>
 <system file="fuel"><!-- Топливная система -->
 </system>
 <system file="hydrosystems"><!-- Гидравлическая система -->
 </system>
 <system file="COC"><!-- Система ограничительных сигналов -->
 </system>
 <system file="ARU-29-2"><!-- Автоматическое регулирование управления -->
 </system>
 <system file="IK-VK"><!-- Информационный комплекс вертикали и курса -->
 </system>
 <system file="TsVU-M"><!-- Цифровое вычислительное устройство - модернизированное -->
 </system>
<!-- <system file="electrical"> -->  <!-- Электрическая система -->
<!-- </system> -->
 <autopilot file="Systems/SAU-451"><!-- Система автоматического управления -->
 </autopilot>

<!--
 <output name="MiG-29-fldata.csv" type="CSV" rate="1">
  <simulation> OFF </simulation>
  <atmosphere> OFF </atmosphere>
  <massprops> OFF </massprops>
  <aerosurfaces> ON </aerosurfaces>
  <rates> OFF </rates>
  <velocities> ON </velocities>
  <forces> OFF </forces>
  <moments> OFF </moments>
  <position> ON </position>
  <coefficients> OFF </coefficients>
  <ground_reactions> OFF </ground_reactions>
  <fcs> ON </fcs>
  <propulsion> ON </propulsion>
  <property>fcs/flap-pos-deg</property>
  <property>ap/speed-pid</property>
  <property>ap/speed-error-switched</property>
  <property>ap/gs-trigger</property>
  <property>ap/gs-pid</property>
  <property>ap/gs-error-switched</property>
  <property>ap/gs-error</property>
 </output>
-->

</fdm_config>
